[
    0, 3^(3/2)/4, 2, 3^(3/2)/2, π;
    0, 1/2, 1/sqrt(2), sqrt(3)/2, 1;
    1, 1/2, (sqrt(2) - 1)/sqrt(2), (2 - sqrt(3))/2, 0;
    0, 27/16, 4, 27/4, π^2;
    16, 27, 32, 36, 4*π^2
]
14*π - 81*sqrt(2)*π/4 + 17*π*sqrt(3)/2 - 17*sqrt(3)*π^2/4 - 81*sqrt(2)*sqrt(3)/4 - 7*π^2 - 243*sqrt(3)/2 + 93*sqrt(2)*sqrt(3)*π^2/16 + 261
(93*sqrt(2)*sqrt(3)/16 - 17*sqrt(3)/4 - 7)*π^2 + π*(17*sqrt(3)/2 - 81*sqrt(2)/4 + 14) + 261 - 243*sqrt(3)/2 - 81*sqrt(2)*sqrt(3)/4
(93*sqrt(2)*sqrt(3)/16 - 17*sqrt(3)/4 - 7)*x^2 + x*(17*sqrt(3)/2 - 81*sqrt(2)/4 + 14) + 261 - 243*sqrt(3)/2 - 81*sqrt(2)*sqrt(3)/4
[
    2*(4*sqrt(54999*sqrt(2)/8 + 1273*sqrt(3) - 13959*sqrt(6)/2 + 20677/4) - 81*sqrt(2) + 34*sqrt(3) + 56)/(68*sqrt(3) - 93*sqrt(6) + 112);
    2*(34*sqrt(3) - 81*sqrt(2) - 4*sqrt(54999*sqrt(2)/8 + 1273*sqrt(3) - 13959*sqrt(6)/2 + 20677/4) + 56)/(68*sqrt(3) - 93*sqrt(6) + 112)
] = [3.1416; -2.45684]
